# ADC charge bucket design
VDDA := 3.3 V
ADC_res := 2^12 = 4096
R_sh := 1 kΩ  # sample-hold resistor and capacitor from datasheet
C_sh := 8 pF
# Smallest input impedance when sampling fastest
R_AIN := 400 Ω
t_acq_min := 0.11 μs
R_sh := t_acq_min/(100*C_sh) = 137.5 Ω
