C_s := 10 pF
# stray capacitance = PCB and MCU pin capacitance must be included (10 pF can be used as a rough estimate of the combined pin and board capacitance)
C_L := 18 pF  # crystal load capacitance
# The two load capacitors should fulfil
C_L - C_s == C_L1*C_L2/(C_L1 + C_L2)
# Defining the two capacitors to be of equal value
C_L - C_s == C_Lext^2/(2*C_Lext) == 1/2*C_Lext
C_Lext := 2*(C_L - C_s) = 16 pF
