# 8A continuous (15A peak) current sensing
# Low-side sense configuration
# Vs (power supply) = 3.3V
V_s := 3.3 V
mΩ := 10^-3*Ω
V_SP := V_s - 30 mV
V_SN := 5 mV
# Select sense resistor
I_max := 8 A
PD_max := 1 W
R_sense < PD_max/I_max^2
PD_max/I_max^2 = 15.625 mΩ
R_sense := 8*mΩ
I_max^2*R_sense = 0.512 W
# Chose either 15mOhm or 10mOhm 1% current sense resistor with gain 20
# Otherwise chose 8mOhm with gain 50
# Select gain (or adjust sense resistor)
I_max_sense := 8 A
I_min := 25 mA  # minimum sensible current
GAIN := 50
I_max_sense*R_sense*GAIN = 3.2 V  # <?
V_SP = 3.27 V
R_sense*GAIN = 0.4 Ω
I_min*R_sense*GAIN = 10 mV
# >?
V_SN = 5 mV
# Resulting resolution with 12-bit ADC
ADC_resolution := 2^12 = 4096
U_mot := 8.25 V
I_resolution := V_s/ADC_resolution*1/(R_sense*GAIN) = 2.01416 mA
I_mot := 1.5 V/(R_sense*GAIN) = 3.75 A
# Error at 1A
R_mot := U_mot/I_mot = 2.2 Ω
OffsetError := 150*μV/(1000 mA*R_sense) = 1.875 %
GainError := 1 %
1000*I_resolution = 2.01416 A
ResistorError := 1 %
TotalError := sqrt(OffsetError^2 + GainError^2 + ResistorError^2) = 2.34854 %
I_resolution = 2.01416 mA
OffsetMeasureableCurrent := 150*μV/R_sense = 18.75 mA
# Current sense RC filter
R := 10*KΩ
C := 10 nF
τ := R*C = 0.1 ms
ω := 1/τ = 10 kHz
t_settling := 5*τ = 0.5 ms
