# MOSFET reverse battery protection voltage divider
V_GS_max := □  # error: This placeholder is empty.
V_GS_th := □  # error: This placeholder is empty.
V_DS_forward := 0.7 V  # forward voltage of drain-source diode
I_DS := 1 A
R_DS_on := 10*10^-3*Ω
R_toGND := 4.7 kΩ
R_toOut := 10 kΩ
V_in := 12 V
V_D := V_in  # due to reverse battery protection configuration
V_S := V_D - V_DS_forward = 11.3 V
V_S := V_D - R_DS_on*I_DS = 11.99 V
V_G := R_toGND/(R_toGND + R_toOut)*V_S = 3.83354 V
V_GS := V_G - V_S = -8.15646 V
V_GS_max < V_GS < V_GS_th  # ???
# See also https://www.instructables.com/id/Reverse-Polarity-Protection-Circuits/
