# VBAT voltage divider
VBAT_max := 30 V
ADC_max := 3.3 V
R_fromIN := 18.2 kΩ
R_toGND := 2.21 kΩ
V_max := VBAT_max*R_toGND/(R_fromIN + R_toGND) = 3.24841 V
# VBAT RC filter
R := R_fromIN
R_toGND/(R_fromIN + R_toGND) = 0.10828
C := 1000 nF
τ := R*C = 18.2 ms
ω := 1/τ = 54.9451 Hz
t_settling := 5*τ = 91 ms
