# Current sense resistor
K := 1350
I_out := 8 A
I_sense := I_out/K = 5.92593 mA
25 mV/0.108 = 0.231481 V
I_sense_max := 4.6 mA
V_sense_max := 3.3 V
R_sense := V_sense_max/I_sense_max = 717.391 Ω
R_sense := 680 Ω
V_sense := 1.77 V
# Current sense RC filter
I_sense := V_sense/R_sense = 2.60294 mA
K/R_sense = 1.98529 1/Ω
R := 10*KΩ
I_out := I_sense*K = 3.51397 A
C := 10 nF
1.8 mH/(2.51 Ω)*5 = 3.58566 ms
τ := R*C = 0.1 ms
ω := 1/τ = 10 kHz
1350/4096*3.3*V = 1.08765 V
2500*0.99 = 2475
8.3 V/(2.12 Ω) = 3.91509 A
t_settling := 5*τ = 0.5 ms
1/4096*3.3/R_sense*K = 0.00159948 1/Ω
